$PROB  THEOPHYLLINE   POPULATION DATA
$INPUT      ID DOSE=AMT TIME DV WT
$DATA       theopp.tab
$SUBROUTINES  ADVAN2 TRANS2

$PK
;THETA(1)=MEAN ABSORPTION RATE CONSTANT (1/HR)
;THETA(2)=MEAN ELIMINATION RATE CONSTANT (1/HR)
;THETA(3)=SLOPE OF CLEARANCE VS WEIGHT RELATIONSHIP (LITERS/HR/KG)
   CALLFL=1
   KA=THETA(1)*EXP(ETA(1))
   V=THETA(2)*EXP(ETA(2))
   K=THETA(3)*EXP(ETA(3))
   CL=K*V
   S2=V

$ERROR
CV=THETA(4)
TAL=THETA(5)
IPRED=F
W=CV*F+TAL
Y=F+W*EPS(1)
IRES=IPRED-DV
IWRES=IRES/W

$THETA  (.1,3,5) (0,0.5,) (.004,.1,2) (0,0.2,) (0,0.1,)
$OMEGA 0.2
$OMEGA BLOCK(2) 0.2 0.05 0.2
$SIGMA 1 FIX

$EST NOABORT METHOD=COND INTERACTION MAXEVAL=2000  PRINT=5
$COV

1NONLINEAR MIXED EFFECTS MODEL PROGRAM (NONMEM)    DOUBLE PRECISION NONMEM    VERSION V LEVEL 1.1
 DEVELOPED AND PROGRAMMED BY STUART BEAL AND LEWIS SHEINER
 PROBLEM NO.:         1
 THEOPHYLLINE   POPULATION DATA
 TOT. NO. OF OBS RECS:     132
 TOT. NO. OF INDIVIDUALS:   12
 ONE COMPARTMENT MODEL WITH FIRST-ORDER ABSORPTION (ADVAN2)
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
0MINIMIZATION SUCCESSFUL
 NO. OF FUNCTION EVALUATIONS USED:  182
 NO. OF SIG. DIGITS IN FINAL EST.:  3.1

 ETABAR IS THE ARITHMETIC MEAN OF THE ETA-ESTIMATES,
 AND THE P-VALUE IS GIVEN FOR THE NULL HYPOTHESIS THAT THE TRUE MEAN IS 0.

 ETABAR:  -0.73E-02  0.46E-03  0.51E-03

 P VAL.:   0.97E+00  0.99E+00  0.99E+00

 ********************                           MINIMUM VALUE OF OBJECTIVE FUNCTION                  ********************

 **************************************************         86.664     **************************************************

 ********************                                  FINAL PARAMETER ESTIMATE                      ********************

 THETA - VECTOR OF FIXED EFFECTS PARAMETERS   *********
            TH 1      TH 2      TH 3      TH 4      TH 5
         1.51E+00  4.60E-01  8.73E-02  8.81E-02  2.58E-01

 OMEGA - COV MATRIX FOR RANDOM EFFECTS - ETAS  ********
            ETA1      ETA2      ETA3
 ETA1
+        4.43E-01
 ETA2
+        0.00E+00  1.45E-02
 ETA3
+        0.00E+00  1.62E-02  1.82E-02

 SIGMA - COV MATRIX FOR RANDOM EFFECTS - EPSILONS  ****
            EPS1
 EPS1
+        1.00E+00

 ********************                             STANDARD ERROR OF ESTIMATE                         ********************

 THETA - VECTOR OF FIXED EFFECTS PARAMETERS   *********
            TH 1      TH 2      TH 3      TH 4      TH 5
         3.08E-01  1.98E-02  4.47E-03  3.29E-02  1.11E-01

 OMEGA - COV MATRIX FOR RANDOM EFFECTS - ETAS  ********
            ETA1      ETA2      ETA3
 ETA1
+        2.56E-01
 ETA2
+       .........  5.71E-03
 ETA3
+       .........  9.61E-03  1.81E-02

 SIGMA - COV MATRIX FOR RANDOM EFFECTS - EPSILONS  ****
            EPS1
 EPS1
+       .........

 ********************                          COVARIANCE MATRIX OF ESTIMATE                         ********************

            TH 1      TH 2      TH 3      TH 4      TH 5      OM11      OM12      OM13      OM22      OM23      OM33      SG11
 TH 1
+        9.48E-02
 TH 2
+       -3.87E-04  3.93E-04
 TH 3
+       -2.31E-04  4.17E-05  2.00E-05
 TH 4
+       -2.90E-04  2.73E-04  1.13E-04  1.08E-03
 TH 5
+       -3.04E-03 -1.25E-03 -3.96E-04 -3.12E-03  1.23E-02
 OM11
+        4.98E-02 -1.39E-03 -1.79E-05 -4.68E-04 -5.95E-03  6.58E-02
 OM12
+       ......... ......... ......... ......... ......... ......... .........
 OM13
+       ......... ......... ......... ......... ......... ......... ......... .........
 OM22
+        1.21E-03  2.03E-05 -7.12E-06 -6.45E-05  7.85E-05  7.94E-04 ......... .........  3.26E-05
 OM23
+        5.61E-04 -6.72E-05 -3.58E-05 -2.58E-04  9.67E-04 -1.15E-04 ......... .........  2.65E-05  9.24E-05
 OM33
+       -1.95E-04 -1.60E-04 -6.61E-05 -4.60E-04  1.94E-03 -1.22E-03 ......... .........  1.88E-05  1.65E-04  3.28E-04
 SG11
+       ......... ......... ......... ......... ......... ......... ......... ......... ......... ......... ......... .........

 ********************                         CORRELATION MATRIX OF ESTIMATE                         ********************

            TH 1      TH 2      TH 3      TH 4      TH 5      OM11      OM12      OM13      OM22      OM23      OM33      SG11
 TH 1
+        1.00E+00
 TH 2
+       -6.33E-02  1.00E+00
 TH 3
+       -1.68E-01  4.69E-01  1.00E+00
 TH 4
+       -2.86E-02  4.18E-01  7.66E-01  1.00E+00
 TH 5
+       -8.88E-02 -5.68E-01 -7.96E-01 -8.54E-01  1.00E+00
 OM11
+        6.31E-01 -2.73E-01 -1.56E-02 -5.55E-02 -2.09E-01  1.00E+00
 OM12
+       ......... ......... ......... ......... ......... ......... .........
 OM13
+       ......... ......... ......... ......... ......... ......... ......... .........
 OM22
+        6.88E-01  1.80E-01 -2.79E-01 -3.43E-01  1.24E-01  5.43E-01 ......... .........  1.00E+00
 OM23
+        1.90E-01 -3.52E-01 -8.31E-01 -8.16E-01  9.05E-01 -4.68E-02 ......... .........  4.83E-01  1.00E+00
 OM33
+       -3.50E-02 -4.45E-01 -8.16E-01 -7.73E-01  9.66E-01 -2.63E-01 ......... .........  1.82E-01  9.48E-01  1.00E+00
 SG11
+       ......... ......... ......... ......... ......... ......... ......... ......... ......... ......... ......... .........
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